*Heading
** Job name: section_properties Model name: Model-1
** Generated by: Abaqus/CAE 2017
*Preprint, echo=NO, model=NO, history=NO, contact=NO
**
** PARTS
**
*Part, name=GIRD_SEC
*Node
      1,  -10.9754562, -0.346782058
      2,  -10.9554644, -0.346195459
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*Element, type=WARP2D3
  1, 27316, 27245, 26669
  2, 27745, 27008, 26747
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*Element, type=WARP2D4
  263, 10997,  3464, 17635, 17522
  264,  3465, 10997, 17522, 32941
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*Nset, nset=whole, generate
     1,  33528,      1
*Elset, elset=whole, generate
     1,  27347,      1
** Section: sec
*Solid Section, elset=whole, material=ALU
,
*End Part
**
**
** ASSEMBLY
**
*Assembly, name=Assembly
**
*Instance, name=GIRD_INST, part=GIRD_SEC
*End Instance
**
*End Assembly
**
** MATERIALS
**
*Material, name=ALU
*Density
2700.,
*Elastic
 7e+10, 0.3
*STEP
*BEAM SECTION GENERATE
*SECTION ORIGIN, ORIGIN=CENTROID
**SECTION POINTS
**113, 190, 1
*END STEP
